**
** Heading +++++++++++++++++++++++++++++++++++++++++++++++++
**
*Heading
Hash: YwTYV8g8, Date: 04/19/2025, Unit system: MM_TON_S_C
**
** Nodes +++++++++++++++++++++++++++++++++++++++++++++++++++
**
*Node
1, 4.70000000E-001, 2.00000000E-001, 0.00000000E+000
2, 4.70000000E-001, 1.97984200E-001, 0.00000000E+000
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**
** Elements ++++++++++++++++++++++++++++++++++++++++++++++++
**
*Element, Type=C3D10, Elset=CHTeles
1, 322, 370, 251, 366, 1463, 1475, 1476, 1420, 1473, 1477
2, 91, 293, 292, 173, 1173, 1175, 1171, 1478, 1479, 1480
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**
** Node sets +++++++++++++++++++++++++++++++++++++++++++++++
**
*Nset, Nset=NCHTNODESN
27, 28, 29, 30, 31, 32
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
** Materials +++++++++++++++++++++++++++++++++++++++++++++++
**
*MATERIAL, NAME=S185
*ELASTIC
210000, 0.300
*CONDUCTIVITY
100.000
*EXPANSION
1.200e-05
*SPECIFIC HEAT
100.0
*DENSITY
1.0
** Sections ++++++++++++++++++++++++++++++++++++++++++++++++
**
*SOLID SECTION, ELSET=CHTeles, MATERIAL=S185
**
**INITIAL CONDITIONS,TYPE=TEMPERATURE
**NCHTNODESN,320
**
** Steps +++++++++++++++++++++++++++++++++++++++++++++++++++
**
*Step, name=HeatTransfer, nlgeom=NO
*Heat Transfer, steady state=NO
0.001,1,1000
*BOUNDARY
NCHTNODESN,11,11,320
*Output, field, frequency=1
*Node Output
NT
*End Step
